*Heading
** Job name: test_11_04 Model name: Model-1
** Generated by: Abaqus/CAE 2022
*Preprint, echo=NO, model=NO, history=NO, contact=NO
**
** PARTS
**
*Part, name=Part-1

*Instance, name=Part-1-1, part=Part-1
*Node
      1,   196.140091,   12.0480433
      2,   190.166183,   20.0691891
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*Element, type=DC2D3
   1, 307, 304, 224
   2, 372, 226, 369
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*Nset, nset=Set-1, generate
   1,  933,    1
*Elset, elset=Set-1, generate
    1,  1720,     1
** Section: Section-1
*Solid Section, elset=Set-1, material=Material-1
,
*End Instance
**
*Nset, nset=Set-3, instance=Part-1-1
  24,  25,  26,  27,  28,  29
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*Elset, elset=Set-3, instance=Part-1-1
  98, 112, 126, 191, 192, 196
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*Nset, nset=Set-4, instance=Part-1-1
   1,   2,   3,   4,   5,   6
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*Elset, elset=Set-4, instance=Part-1-1
   3,  32,  33,  39,  45,  47
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*Nset, nset=Set-5, instance=Part-1-1
   1,   2,   3,   4,   5,   6
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*Elset, elset=Set-5, instance=Part-1-1
   3,  32,  33,  39,  45,  47
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
*End Part
**
**
** ASSEMBLY
**
*Assembly, name=Assembly
**
*Instance, name=Part-1-1, part=Part-1
*Node
      1,   196.140091,   12.0480433
      2,   190.166183,   20.0691891
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*Element, type=DC2D3
   1, 307, 304, 224
   2, 372, 226, 369
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*Nset, nset=Set-1, generate
   1,  933,    1
*Elset, elset=Set-1, generate
    1,  1720,     1
** Section: Section-1
*Solid Section, elset=Set-1, material=Material-1
,
*End Instance
**
*Nset, nset=Set-3, instance=Part-1-1
  24,  25,  26,  27,  28,  29
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*Elset, elset=Set-3, instance=Part-1-1
  98, 112, 126, 191, 192, 196
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*Nset, nset=Set-4, instance=Part-1-1
   1,   2,   3,   4,   5,   6
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*Elset, elset=Set-4, instance=Part-1-1
   3,  32,  33,  39,  45,  47
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*Nset, nset=Set-5, instance=Part-1-1
   1,   2,   3,   4,   5,   6
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*Elset, elset=Set-5, instance=Part-1-1
   3,  32,  33,  39,  45,  47
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*End Assembly
*Amplitude, name=Amp-1
             1.,              6.,              2.,              5.,              3.,              5.,              4.,              5.
             5.,              6.,              6.,              7.,              7.,              8.,              8.,              9.
             9.,              9.,             10.,             10.,             11.,             12.,             12.,             14.
            13.,             14.,             14.,             17.,             15.,             19.,             16.,             20.
            17.,             21.,             18.,             22.,             19.,             24.,             20.,             26.
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            93.,             10.,             94.,              8.,             95.,              7.,             96.,              6.
**
** MATERIALS
**
*Material, name=Material-1
*Conductivity
112320.,
*Density
2690.,
*Specific Heat
840.,
** ----------------------------------------------------------------
**
** STEP: Step-1
**
*Step, name=Step-1, nlgeom=NO
*Heat Transfer, end=PERIOD
7., 672., , ,
**
** BOUNDARY CONDITIONS
**
** Name: BC-1 Type: Temperature
*Boundary
Set-3, 11, 11, 5.
** Name: BC-2 Type: Temperature
*Boundary, amplitude=Amp-1
Set-5, 11, 11, 1.
**
** OUTPUT REQUESTS
**
*Restart, write, frequency=0
**
** FIELD OUTPUT: F-Output-1
**
*Output, field
*Node Output
NT,
*Element Output, directions=YES
TEMP,
*Output, history, frequency=0
*End Step
